*HEADING
 Thermal analysis of printing a 42-layer thinwall (LDED, Inconel625)
 Inter-layer dwell time 0s
*PARAMETER
beadWidth = 3.35
*PARAMETER
beadHeight = 0.9071
*PARAMETER
laserSpotRadius = 2.0
*PARAMETER
penetrationDepth = 1.1
*PARAMETER
GoldakParamA = laserSpotRadius
*PARAMETER
GoldakParamB = penetrationDepth
*PARAMETER
GoldakParamCF = laserSpotRadius
*PARAMETER
GoldakParamCR = laserSpotRadius
*PARAMETER
GoldakParamFF = 2*(GoldakParamCF)/(GoldakParamCR+GoldakParamCF)
*PARAMETER
GoldakParamFR = 2*(GoldakParamCR)/(GoldakParamCR+GoldakParamCF)
**HW_COMPONENT     ID=1     COLOR=11     NAME=PartToFabricate     PROPERTY=PartToFabricate
*ELEMENT,TYPE=DC3D8,ELSET=PartToFabricate
         1,       126,      1019,      2892,       779,         1,        45,       569,        81
         2,      1019,      1020,      2893,      2892,        45,        46,       570,       569
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**HW_COMPONENT     ID=2     COLOR=43     NAME=Substrate     PROPERTY=Substrate
*ELEMENT,TYPE=DC3D8,ELSET=Substrate
      2161,       192,      1285,      3732,      1229,         7,       157,      1131,       170
      2162,      1285,      1286,      3733,      3732,       157,       158,      1132,      1131
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**HW_COMPONENT     ID=3     COLOR=59     NAME=Clamp     PROPERTY=Clamp
*ELEMENT,TYPE=DC3D8,ELSET=Clamp
      4337,       296,      2077,      5356,      1964,        20,       345,      2063,       291
      4338,      2077,      2078,      5357,      5356,       345,       346,      2064,      2063
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**HMNAME PROPERTY          1 PartToFabricate    11
*SOLID SECTION, ELSET=PartToFabricate, MATERIAL=Inconel625
**HMNAME PROPERTY          2 Substrate    43
*SOLID SECTION, ELSET=Substrate, MATERIAL=Inconel625
**HMNAME PROPERTY          3 Clamp    59
*SOLID SECTION, ELSET=Clamp, MATERIAL=Aluminum
**------------------------------------------------
** Stefan Boltzmann constant unit: mW/(mm^2.C^4)
**------------------------------------------------
**HMNAME MATS          1 Aluminum    23
*MATERIAL, NAME=Aluminum
** Unit: mW/(mm.C)
*CONDUCTIVITY,TYPE=ISO
237.0     ,0.0
** Unit: mJ/(tonne.C)
*SPECIFIC HEAT
910000000.,0.0
** Unit: tonne/mm^3
*DENSITY
2.7000E-09,0.0
**
**HMNAME MATS          2 Inconel625    43
*MATERIAL, NAME=Inconel625
** Unit: mW/(mm.C)
*CONDUCTIVITY,TYPE=ISO
9.9       ,20.0
10.8      ,93.0
12.5      ,205.0
14.1      ,315.0
15.7      ,425.0
17.5      ,540.0
19.0      ,650.0
20.8      ,760.0
22.8      ,870.0
** Unit: mJ/(tonne.C)
*SPECIFIC HEAT
410000000.,20.0
427000000.,93.0
456000000.,205.0
481000000.,315.0
511000000.,425.0
536000000.,540.0
565000000.,650.0
590000000.,760.0
620000000.,870.0
** Unit: tonne/mm^3
*DENSITY
8.4400E-09,0.0
**HM_UNSUPPORTED_MATERIAL
*LATENT HEAT, SMOOTH
 272E9, 1290., 1350., 18.
**HM_UNSUPPORTED_CARDS_MIDDLE
*ELEMENT PROGRESSIVE ACTIVATION, NAME="LDED.Printing", ELSET=PartToFabricate
*TABLE COLLECTION, NAME="ABQ_AM.MaterialDeposition"
*PARAMETER TABLE, TYPE= "ABQ_AM_MaterialDeposition"
 "LDED.PrintHeadDepositionTrajectory","Bead"
*PARAMETER TABLE,  TYPE= "ABQ_AM_MaterialDeposition_Bead"
 "Z", <beadHeight>, <beadWidth>, 0.,"Below"
*PARAMETER TABLE,  TYPE= "ABQ_AM_MaterialDeposition_Advanced"
 "Full",0.0,0.0,0.01,,,
*TABLE COLLECTION, NAME="ABQ_AM.EnergyInput"
*PARAMETER TABLE,  TYPE="ABQ_AM_MovingHeatSource"
 "LDED.LaserPath","Goldak"
*PARAMETER TABLE,  TYPE="ABQ_AM_MovingHeatSource_Advanced"
 "True","False","Relative",0.0,0.0,-1.0, 1.0
*PARAMETER TABLE,  TYPE="ABQ_AM_MovingHeatSource_Goldak"
 10, 10, 10,
 <GoldakParamA>, <GoldakParamB>, <GoldakParamCF>, <GoldakParamCR>,
 <GoldakParamFF>, <GoldakParamFR>,
 1.25
*PROPERTY TABLE, TYPE="ABQ_AM_AbsorptionCoeff"
 0.4
*Event Series, Name="LDED.PrintHeadDepositionTrajectory",
               Type="ABQ_AM_MaterialDeposition",
               Time=Total, input=./es_thinwall_dwell0.inp
*Event Series, Name="LDED.LaserPath",
               Type="ABQ_AM_PowerMagnitude",
               Time=Total, input=./es_thinwall_dwell0.inp
**HMNAME PROPERTY          4 Physical_Constant_4
*PHYSICAL CONSTANTS,ABSOLUTE ZERO = -273.15,STEFAN BOLTZMANN = 5.67e-11
**HWNAME LOADCOL          1 HM_IC_Load_Cols_1
**HWCOLOR LOADCOL          1    11
*INITIAL CONDITIONS, TYPE = TEMPERATURE
All,26.
*INCLUDE, INPUT =ABQ_am_special_purpose_types.inp
*INCLUDE, INPUT =mesh_thinwall_ht.inp
**HMNAME LOADSTEP          1 Printing
*STEP, INC =        80000, NAME = Printing, EXTRAPOLATION = NO, UNSYMM=YES
*HEAT TRANSFER
0.5       ,  626.5600   ,5.0000E-11,0.5
**HM_UNSUPPORTED_STEP_CARD
*ACTIVATE ELEMENTS,ACTIVATION="LDED.Printing"
 "ABQ_AM.MaterialDeposition"
*OUTPUT, FIELD, FREQUENCY = 1
*NODE OUTPUT
  NT
*OUTPUT, HISTORY, FREQUENCY = 1
*NODE OUTPUT, NSET = NOutputTC1
  NT
*OUTPUT, HISTORY, FREQUENCY = 1
*NODE OUTPUT, NSET = NOutputTC2
  NT
*OUTPUT, HISTORY, FREQUENCY = 1
*NODE OUTPUT, NSET = NOutputTC3
  NT
*END STEP
**HMNAME LOADSTEP          2 Cooling
*STEP, INC =        80000, NAME = Cooling, EXTRAPOLATION = NO, UNSYMM=YES
*HEAT TRANSFER
10.0      ,500.0     ,1.0000E-09,10.0
*OUTPUT, FIELD, FREQUENCY = 1
*NODE OUTPUT
  NT
*OUTPUT, HISTORY, FREQUENCY = 1
*NODE OUTPUT, NSET = NOutputTC1
 NT
*OUTPUT, HISTORY, FREQUENCY = 1
*NODE OUTPUT, NSET = NOutputTC2
 NT
*OUTPUT, HISTORY, FREQUENCY = 1
*NODE OUTPUT, NSET = NOutputTC3
 NT
*END STEP
**HMNAME LOADSTEP          3 MoreCooling
*STEP, INC =        80000, NAME = MoreCooling, EXTRAPOLATION = NO, UNSYMM=YES
*HEAT TRANSFER
100.0     ,10000.0   ,1.0000E-08,100.0
*OUTPUT, FIELD, FREQUENCY = 1
*NODE OUTPUT
 NT
*OUTPUT, HISTORY, FREQUENCY = 1
*NODE OUTPUT, NSET = NOutputTC1
 NT
*OUTPUT, HISTORY, FREQUENCY = 1
*NODE OUTPUT, NSET = NOutputTC2
 NT
*OUTPUT, HISTORY, FREQUENCY = 1
*NODE OUTPUT, NSET = NOutputTC3
 NT
*END STEP
