**
** ABAQUS Input Deck Generated by HyperMesh Version  : 2024.1.0.30
** Generated using HyperMesh-Abaqus Template Version : 2024.1.0.30-123966
** Generated on 06-21-2025 at 01:13:18
**
**   Template:  ABAQUS/STANDARD 3D
**
*HEADING
 Thermal analysis of printing a 42-layer thinwall (LDED, Inconel625)
 Inter-layer dwell time 0s
*PARAMETER
beadWidth = 3.35
*PARAMETER
beadHeight = 0.9071
*PARAMETER
laserSpotRadius = 2.0
*PARAMETER
penetrationDepth = 1.1
*PARAMETER
GoldakParamA = laserSpotRadius
*PARAMETER
GoldakParamB = penetrationDepth
*PARAMETER
GoldakParamCF = laserSpotRadius
*PARAMETER
GoldakParamCR = laserSpotRadius
*PARAMETER
GoldakParamFF = 2*(GoldakParamCF)/(GoldakParamCR+GoldakParamCF)
*PARAMETER
GoldakParamFR = 2*(GoldakParamCR)/(GoldakParamCR+GoldakParamCF)
**HM_UNSUPPORTED_CARDS_START
*EVENT SERIES TYPE, Fields=1, NAME="ABQ_AM_MaterialDeposition"
 "On/Off state (on=1, off=0) "
*PARAMETER TABLE TYPE, NAME="ABQ_AM_MaterialDeposition", PARAMETERS=2
 STRING, , "Event series"      , ,              ,
 STRING, , "Deposition process", , "Roller|Bead",
*PARAMETER TABLE TYPE, NAME="ABQ_AM_MaterialDeposition_Bead", PARAMETERS = 5
 STRING, , "Stack direction"    , , "X|Y|Z"      ,
 FLOAT , , "Bead height"        , ,              ,
 FLOAT , , "Bead width"         , ,              ,
 FLOAT , , "Activation offset"  , ,              ,
 STRING, , "Deposition position", , "Below|Above|Middle",
*PARAMETER TABLE TYPE, NAME="ABQ_AM_MaterialDeposition_Advanced",PARAMETERS = 6
 STRING, "Partial", "Activation type"              , , "Full|Partial",
 FLOAT , 0.0      , "Min volume fraction threshold for partial activation", ,               ,
 FLOAT , 1.0      , "Max volume fraction threshold for partial activation", ,               ,
 FLOAT , 0.0      , "Max volume fraction threshold for full activation", ,               ,
 STRING,"Yes"     , "Update orientation for bead type deposition", , ,
 INTEGER, 0       , "Element subdivision order (set to zero for automatic subdivision order)", ,,
*PARAMETER TABLE TYPE,  NAME="ABQ_AM_MaterialDeposition_VariableBeadSize", PARAMETERS = 2
 INTEGER, 5,"ES field ID for height",L,"zero indicates constant bead height"
 INTEGER, 6,"ES field ID for width",L,"zero indicates constant bead width"
*EVENT SERIES TYPE, Fields=1, NAME="ABQ_AM_PowerMagnitude"
 "Power magnitude (unit of JT^-1)"
*PARAMETER TABLE TYPE, NAME="ABQ_AM_MovingHeatSource", PARAMETERS = 2
 STRING, , "Event series"       , ,                              ,
 STRING, , "Energy distribution", , "Concentrated|Uniform|Goldak",
*PARAMETER TABLE TYPE, NAME="ABQ_AM_MovingHeatSource_Uniform", PARAMETERS=9
 INTEGER, , "SubDivX"   , , ,
 INTEGER, , "SubDivY"   , , ,
 INTEGER, , "SubDivZ"   , , ,
 FLOAT  , , "OffsetX"   , , ,
 FLOAT  , , "OffsetY"   , , ,
 FLOAT  , , "OffsetZ"   , , ,
 FLOAT  , , "BoxLengthX", , ,
 FLOAT  , , "BoxLengthY", , ,
 FLOAT  , , "BoxLengthZ", , ,
*PARAMETER TABLE TYPE, NAME="ABQ_AM_MovingHeatSource_Goldak", PARAMETERS=10
 INTEGER, , "SubDivX"      , , ,
 INTEGER, , "SubDivY"      , , ,
 INTEGER, , "SubDivZ"      , , ,
 FLOAT  , , "a"            , , ,
 FLOAT  , , "b"            , , ,
 FLOAT  , , "cf"           , , ,
 FLOAT  , , "cr"           , , ,
 FLOAT  , , "ff"           , , ,
 FLOAT  , , "fr"           , , ,
 FLOAT  , , "BoxSizeFactor", , ,
*PARAMETER TABLE TYPE, NAME="ABQ_AM_MovingHeatSource_Advanced", PARAMETERS = 7
 STRING, "False"   , "Conserve total energy" , , "True|False"       ,
 STRING, "False"   , "Control increment size", , "True|False"       ,
 STRING, "Relative", "Offset type"           , , "Absolute|Relative",
 FLOAT , 0.0       , "VectorX"               , ,                    ,
 FLOAT , 0.0       , "VectorY"               , ,                    ,
 FLOAT , -1.0      , "VectorZ"               , ,                    ,
 FLOAT , 1.0       , "Field factor"          , ,                    ,
*PARAMETER TABLE TYPE,  NAME="ABQ_AM_MovingHeatSource_VariableBeadSize", PARAMETERS = 2
 INTEGER, 5, "ES field ID for height",L,"zero indicates constant bead height"
 INTEGER, 6, "ES field ID for width",L,"zero indicates constant bead width"
*PROPERTY TABLE TYPE, NAME="ABQ_AM_AbsorptionCoeff", PROP=1
 "Absorption coefficient (between 0 and 1)"
*PARAMETER TABLE TYPE, NAME="ABQ_AM_ThermoMech_PatternBased_Activation", PARAMETERS=13
 FLOAT,  1.0,       "Slice height",                          L,,
 FLOAT,  1.0,       "OriAX",                                 L,,
 FLOAT,  0.0,       "OriAY",                                 L,,
 FLOAT,  0.0,       "OriAZ",                                 L,,
 FLOAT,  0.0,       "OriBX",                                 L,,
 FLOAT,  1.0,       "OriBY",                                 L,,
 FLOAT,  0.0,       "OriBZ",                                 L,,
 FLOAT,  0.0,       "OriCX",                                 L,,
 FLOAT,  0.0,       "OriCY",                                 L,,
 FLOAT,  0.0,       "OriCZ",                                 L,,
 FLOAT,  0.0,       "Recoater time",                         T,,
 FLOAT,  0.0,       "Print start time",                      T,,
 STRING, "TOTALTIME","Step or total time for print start time",T,"STEPTIME|TOTALTIME",
*PARAMETER TABLE TYPE, NAME="ABQ_AM_ThermoMech_ScanParameter_Define", Parameters = 4
 FLOAT, 0.0, "Power",          , ,
 FLOAT, 0.0, "Width/Hatch/Scan Spacing",          , ,
 FLOAT, 0.0, "Speed",          , ,
 FLOAT, 0.0, "OnTimeFraction", , ,
*PARAMETER TABLE TYPE, NAME="ABQ_AM_ThermoMech_PatternBased_Define", PARAMETERS=6
 FLOAT, 0.0,     "XLocalMin"  ,,
 FLOAT, 0.0,     "YLocalMin"  ,,
 FLOAT, 1000.0,  "XLocalMax"  ,,
 FLOAT, 1000.0,  "YLocalMax"  ,,
 STRING," ",     "LABEL of a table of type ABQ_AM_ThermoMech_ScanParameter_Define", , ,
 FLOAT, 0.0,     "Initial in-plane rotation",,
*PARAMETER TABLE TYPE, NAME="ABQ_AM_ThermoMech_PatternBased_ScanStrategy_Define", PARAMETERS=8
 STRING,  " ", "Pattern"                ,,
 FLOAT,   0.0, "Relative Rotation Angle",,
 FLOAT, -1e36, "XMin"                   ,,
 FLOAT, -1e36, "YMin"                   ,,
 FLOAT, -1e36, "ZMin"                   ,,
 FLOAT,  1e36, "XMax"                   ,,
 FLOAT,  1e36, "YMax"                   ,,
 FLOAT,  1e36, "ZMax"                   ,,
*PARAMETER TABLE TYPE, NAME="ABQ_AM_ThermoMech_PatternBased_ScanStrategy_Define_Elset", PARAMETERS=3
 STRING,  " ", "Pattern"                 ,,
 FLOAT,   0.0, "Relative Rotation Angle" ,,
 STRING,  " ", "Elset Name"              ,,
*PARAMETER TABLE TYPE, NAME="ABQ_AM_ThermoMech_PatternBased_ScanStrategies", PARAMETERS=1
 STRING," ", "Name of table of type ABQ_AM_ThermoMech_PatternBased_ScanStrategy_Define", ,,
*PARAMETER TABLE TYPE, NAME="ABQ_AM_ThermoMech_Activation_Advanced", PARAMETERS=4
 STRING, "Full", "Element Activation"               , , "Full|Partial",
 FLOAT,     0.0, "MIN VOL FRAC PARTIAL ACTIVATION"  , , "",
 FLOAT,     1.0, "MAX VOL FRAC PARTIAL ACTIVATION"  , , "",
 FLOAT,     0.0, "MAX VOL FRAC FULL ACTIVATION"     , , "",
*PARAMETER TABLE TYPE, NAME="ABQ_AM_ThermoMech_PatternBased_Advanced", PARAMETERS=2
 STRING, "SWEEP"  , "Activation technique"              , , "SWEEP|LAYERBYLAYER",
 INTEGER,        1, "Number of slice per time increment", , ,
*PARAMETER TABLE TYPE, NAME="ABQ_AM_ThermoMech_PatternParameters", PARAMETERS=1
 STRING," ", "LABEL of the table collection for ACTIVATE ELEMENT", , ,
*EVENT SERIES TYPE, NAME="ABQ_AM_HeatSourceTrajectory_RuleID", Fields=1
 "Rule #"
*PARAMETER TABLE TYPE, NAME="ABQ_AM_EigenStrain_Method", PARAMETERS=1
 STRING, "TrajectoryBased", "Activation type", , "PatternBased|TrajectoryBased",
*PARAMETER TABLE TYPE, NAME="ABQ_AM_EigenStrain_Define", Parameters = 6
 FLOAT, 0.0, "Eig11", , ,
 FLOAT, 0.0, "Eig22", , ,
 FLOAT, 0.0, "Eig33", , ,
 FLOAT, 0.0, "Eig12", , ,
 FLOAT, 0.0, "Eig13", , ,
 FLOAT, 0.0, "Eig23", , ,
*PARAMETER TABLE TYPE, NAME="ABQ_AM_EigenStrain_Activation_Advanced", PARAMETERS=5
 STRING,  "Full"             , "Element activation" , , "Full|Partial"              ,
 FLOAT,   0.0                , "Min volume fraction for partial activation", ,      ,
 FLOAT,   1.0                , "Max volume fraction for partial activation", ,      ,
 FLOAT,   0.0                , "Max volume fraction for full activation", ,         ,
 STRING,  "FirstIntersection", "Avg technology"     , , "FirstIntersection|Averaged",
*PARAMETER TABLE TYPE, NAME="ABQ_AM_EigenStrain_TrajectoryBased_Activation", PARAMETERS = 5
 STRING, " "    , "Deposition head event series", ,              ,
 STRING, "Z"    , "Stack direction"             , , "X|Y|Z"      ,
 FLOAT , 1.0    , "Bead height"                 , ,              ,
 FLOAT , 1.0    , "Bead width"                  , ,              ,
 STRING, "Below", "Deposition position"         , , "Below|Above|Middle",
*PARAMETER TABLE TYPE, NAME="ABQ_AM_EigenStrain_TrajectoryBased_Rule_Define", PARAMETERS=1
 STRING, " ", "Label of an EigenStrain_Define table", , ,
*PARAMETER TABLE TYPE, NAME="ABQ_AM_EigenStrain_TrajectoryBased_Rules", PARAMETERS=1
 STRING, " ", "Trajectory rule name", , ,
*PARAMETER TABLE TYPE, NAME="ABQ_AM_EigenStrain_PatternBased_Activation", PARAMETERS=13
 FLOAT , 1.0         , "Slice height"   , ,                     ,
 FLOAT , 1.0         , "OriAX"          , ,                     ,
 FLOAT , 0.0         , "OriAY"          , ,                     ,
 FLOAT , 0.0         , "OriAZ"          , ,                     ,
 FLOAT , 0.0         , "OriBX"          , ,                     ,
 FLOAT , 1.0         , "OriBY"          , ,                     ,
 FLOAT , 0.0         , "OriBZ"          , ,                     ,
 FLOAT , 0.0         , "OriCX"          , ,                     ,
 FLOAT , 0.0         , "OriCY"          , ,                     ,
 FLOAT , 0.0         , "OriCZ"          , ,                     ,
 STRING, "TotalTime" , "Total/Step time", , "TotalTime|StepTime",
 FLOAT , -1e36       , "Start time"     , ,                     ,
 FLOAT , +1e36       , "End time"       , ,                     ,
*PARAMETER TABLE TYPE, NAME="ABQ_AM_EigenStrain_PatternBased_Define", PARAMETERS=6
 FLOAT , 0.0   , "xmin"                                , , ,
 FLOAT , 0.0   , "ymin"                                , , ,
 FLOAT , 1000.0, "xmax"                                , , ,
 FLOAT , 1000.0, "ymax"                                , , ,
 STRING, " "   , "Label of an EigenStrain_Define table", , ,
 FLOAT , 0.0   , "Local in-plane rotation (in degrees)", , ,
*PARAMETER TABLE TYPE, NAME="ABQ_AM_EigenStrain_PatternBased_ScanStrategy_Define", PARAMETERS=8
 STRING, " "  , "Pattern"                             , , ,
 FLOAT , 0.0  , "Relative rotation angle (in degrees)", , ,
 FLOAT , -1e36, "Xmin"                                , , ,
 FLOAT , -1e36, "Ymin"                                , , ,
 FLOAT , -1e36, "Zmin"                                , , ,
 FLOAT ,  1e36, "Xmax"                                , , ,
 FLOAT ,  1e36, "Ymax"                                , , ,
 FLOAT ,  1e36, "Zmax"                                , , ,
*PARAMETER TABLE TYPE, NAME="ABQ_AM_EigenStrain_PatternBased_ScanStrategy_Define_Elset", PARAMETERS=3
 STRING, " "  , "Pattern"                              , , ,
 FLOAT , 0.0  , "Relative rotation angle (in degrees)" , , ,
 STRING, " "  , "Elset Name"                           , , ,
*PARAMETER TABLE TYPE, NAME="ABQ_AM_EigenStrain_PatternBased_ScanStrategies", PARAMETERS=1
 STRING, " ", "Scan strategy", , ,
*PARAMETER TABLE TYPE, NAME="ABQ_AM_EigenStrain_PatternBased_Advanced", PARAMETERS=2
 STRING, "SWEEP", "Activation technique"        , , "SWEEP|LAYERBYLAYER",
 STRING, "TRUE" , "One slice per time increment", , "TRUE|FALSE"        ,
*PARAMETER TABLE TYPE,  NAME="ABQ_AM_BladeInterference", PARAMETERS = 2
FLOAT, 0.0,"Powder Thickness", L,"If the value = 0 then information comes from PTK otherwise this value is used"
FLOAT, 1.0,"Risk Factor",Dimensionless," "
*PARAMETER TABLE TYPE,  NAME="ABQ_AM_MaterialDeposition_Bead_Orientation", PARAMETERS = 3
 FLOAT,0,"Bead orientation x",L,""
 FLOAT,0,"Bead orientation y",L,""
 FLOAT,1,"Bead orientation z",L,""
*PARAMETER TABLE TYPE,  NAME="ABQ_AM_MaterialRemoval_Bead_Orientation", PARAMETERS = 3
 FLOAT,0,"Removal bead orientation x",L,""
 FLOAT,0,"Removal bead orientation y",L,""
 FLOAT,1,"Removal bead orientation z",L,""
*PARAMETER TABLE TYPE,  NAME="ABQ_AM_MaterialRemoval", PARAMETERS = 1
 STRING, ,"Event Series",,"Event Series"
*PARAMETER TABLE TYPE,  NAME="ABQ_AM_MaterialRemoval_Bead", PARAMETERS = 5
 STRING, ,"Stack Direction",, "X|Y|Z"
 FLOAT,  ,"Bead Height",L,"Height of the bead deposition cross-section"
 FLOAT,  ,"Bead Width",L,"Width of the bead deposition cross-section"
 FLOAT,  ,"Activation Offset",L," "
 STRING, ,"Deposition Position",,"Below|Above|Middle"
*PARAMETER TABLE TYPE,  NAME="ABQ_AM_MaterialRemoval_VariableBeadSize", PARAMETERS = 2
 INTEGER, 5, "ES field ID for height",L,"zero indicates constant bead height"
 INTEGER, 6, "ES field ID for width",L,"zero indicates constant bead width"
*PARAMETER TABLE TYPE,  NAME="ABQ_AM_MaterialRemoval_Advanced", PARAMETERS = 5
 STRING,"Partial","Activation Type",Dimensionless, "Full|Partial"
 FLOAT,1.0,"Deactivation Threshold",Dimensionless, "For partial activation"
 FLOAT,1.0,"Max Volume fraction",Dimensionless, "For partial activation"
 FLOAT,0.0,"Max Volume fraction",Dimensionless, "For full activation"
 INTEGER,0,"Element subdivision order",Dimensionless, "set to zero for automatic subdivision order"
*PARAMETER TABLE TYPE,  NAME="ABQ_AM_MaterialDeposition_5AxisStrategy", PARAMETERS = 4
 STRING,"True","Ignore lead angle/Consider only tilt", , "True|False"
 INTEGER,2,"ES field ID for normal vector component x",L," "
 INTEGER,3,"ES field ID for normal vector component y",L," "
 INTEGER,4,"ES field ID for normal vector component z",L," "
*PARAMETER TABLE TYPE,  NAME="ABQ_AM_MovingHeatSource_5AxisStrategy", PARAMETERS = 4
 STRING,"True","Ignore lead angle/Consider only tilt", , "True|False"
 INTEGER,2,"ES field ID for normal vector component x",L," "
 INTEGER,3,"ES field ID for normal vector component y",L," "
 INTEGER,4,"ES field ID for normal vector component z",L," "
*PARAMETER TABLE TYPE,  NAME="ABQ_AM_MaterialRemoval_5AxisStrategy", PARAMETERS = 4
 STRING,"True","Ignore lead angle/Consider only tilt", , "True|False"
 INTEGER,2,"ES field ID for normal vector component x",L," "
 INTEGER,3,"ES field ID for normal vector component y",L," "
 INTEGER,4,"ES field ID for normal vector component z",L," "
*EVENT SERIES TYPE, Fields=4, NAME="ABQ_AM_PowerMagnitude_5AxisStrategy"
 "Power", ML2T03
 "ES field ID for normal vector component x",L
 "ES field ID for normal vector component y",L
 "ES field ID for normal vector component z",L
*EVENT SERIES TYPE, Fields=5, NAME="ABQ_AM_PowerMagnitude_5AxisStrategy_width"
 "Power", ML2T03
 "ES field ID for normal vector component x",L
 "ES field ID for normal vector component y",L
 "ES field ID for normal vector component z",L
 "ES field ID for width", L
*EVENT SERIES TYPE, Fields=2, NAME="ABQ_AM_MaterialDeposition_VariableWidth"
 "On and off", Dimensionless
 "Width", L
*EVENT SERIES TYPE, Fields=3, NAME="ABQ_AM_MaterialDeposition_VariableHeightWidth"
 "On and off", Dimensionless
 "Height", L
 "Width", L
*EVENT SERIES TYPE, Fields=2, NAME="ABQ_AM_MaterialDeposition_VariableHeight"
 "On and off", Dimensionless
 "Height", L
*EVENT SERIES TYPE, Fields=4, NAME="ABQ_AM_MaterialDeposition_5AxisStrategy"
 "On and off", Dimensionless
 "ES field ID for normal vector component x",L
 "ES field ID for normal vector component y",L
 "ES field ID for normal vector component z",L
*EVENT SERIES TYPE, Fields=5, NAME="ABQ_AM_MaterialDeposition_5AxisStrategy_width"
 "On and off", Dimensionless
 "ES field ID for normal vector component x",L
 "ES field ID for normal vector component y",L
 "ES field ID for normal vector component z",L
 "ES field ID for width", L
*EVENT SERIES TYPE, Fields=6, NAME="ABQ_AM_MaterialDeposition_5AxisStrategy_VariableCrossSection"
 "On and off", Dimensionless
 "ES field ID for normal vector component x",L
 "ES field ID for normal vector component y",L
 "ES field ID for normal vector component z",L
 "ES field ID for height", L
 "ES field ID for width", L
*EVENT SERIES TYPE, Fields=6, NAME="ABQ_AM_MovingHeatSource_5AxisStrategy_VariableCrossSection"
 "Power", ML2T03
 "ES field ID for normal vector component x",L
 "ES field ID for normal vector component y",L
 "ES field ID for normal vector component z",L
 "ES field ID for height", L
 "ES field ID for width", L
*NODE
         1,  -12.0299969    ,  6.69999981     ,  25.3999996
         2,  -12.0299969    ,  0.0            ,  25.3999996
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**HW_COMPONENT     ID=1     COLOR=11     NAME=PartToFabricate     PROPERTY=PartToFabricate
*ELEMENT,TYPE=DC3D8,ELSET=PartToFabricate
         1,       126,      1019,      2892,       779,         1,        45,       569,        81
         2,      1019,      1020,      2893,      2892,        45,        46,       570,       569
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**HW_COMPONENT     ID=2     COLOR=43     NAME=Substrate     PROPERTY=Substrate
*ELEMENT,TYPE=DC3D8,ELSET=Substrate
      2161,       192,      1285,      3732,      1229,         7,       157,      1131,       170
      2162,      1285,      1286,      3733,      3732,       157,       158,      1132,      1131
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**HW_COMPONENT     ID=3     COLOR=59     NAME=Clamp     PROPERTY=Clamp
*ELEMENT,TYPE=DC3D8,ELSET=Clamp
      4337,       296,      2077,      5356,      1964,        20,       345,      2063,       291
      4338,      2077,      2078,      5357,      5356,       345,       346,      2064,      2063
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**HMNAME PROPERTY          1 PartToFabricate    11
*SOLID SECTION, ELSET=PartToFabricate, MATERIAL=Inconel625
**HMNAME PROPERTY          2 Substrate    43
*SOLID SECTION, ELSET=Substrate, MATERIAL=Inconel625
**HMNAME PROPERTY          3 Clamp    59
*SOLID SECTION, ELSET=Clamp, MATERIAL=Aluminum
**HW_FORMULA_SET     ID=1
*NSET, NSET=All, GENERATE
         1,     78372,         1
**HW_SET     ID=9
*NSET, NSET=Clamp:1
        13,        14,        15,        16,        17,        18
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**HW_SET     ID=10
*NSET, NSET=ClampBottom:1
        23,        25,        27,        28,       311,       312
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**HW_SET     ID=11
*NSET, NSET=ClampTop:1
        33,        34,        39,        40,       439,       440
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**HW_SET     ID=12
*NSET, NSET=PartToFabricate:1
         1,         2,         3,         4,         9,        10
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**HW_SET     ID=13
*NSET, NSET=Substrate:1
         1,         2,         3,         4,         5,         6
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**HW_SET     ID=17
*NSET, NSET=NOutputTC2
       167,
**HW_SET     ID=18
*NSET, NSET=NOutputTC1
       181,
**HW_SET     ID=19
*NSET, NSET=NOutputTC3
       271,
**HW_SET     ID=2
*ELSET, ELSET=All, GENERATE
         1,     67536,         1
**HW_SET     ID=3
*ELSET, ELSET=Clamp
      4337,      4338,      4339,      4340,      4341,      4342
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**HW_SET     ID=4
*ELSET, ELSET=ClampBottom
      4553,      4554,      4555,      4556,      4557,      4558
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**HW_SET     ID=5
*ELSET, ELSET=ClampTop
      5073,      5074,      5075,      5076,      5077,      5078
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**HW_SET     ID=6
*ELSET, ELSET=PartToFabricate
         1,         2,         3,         4,         5,         6
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**HW_SET     ID=7
*ELSET, ELSET=Substrate
      2161,      2162,      2163,      2164,      2165,      2166
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**HW_SET     ID=8
*ELSET, ELSET=PartAndSubstrate
         1,         2,         3,         4,         5,         6
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**------------------------------------------------
** Stefan Boltzmann constant unit: mW/(mm^2.C^4)
**------------------------------------------------
**HMNAME MATS          1 Aluminum    23
*MATERIAL, NAME=Aluminum
** Unit: mW/(mm.C)
*CONDUCTIVITY,TYPE=ISO
237.0     ,0.0
** Unit: mJ/(tonne.C)
*SPECIFIC HEAT
910000000.,0.0
** Unit: tonne/mm^3
*DENSITY
2.7000E-09,0.0
**
**HMNAME MATS          2 Inconel625    43
*MATERIAL, NAME=Inconel625
** Unit: mW/(mm.C)
*CONDUCTIVITY,TYPE=ISO
9.9       ,20.0
10.8      ,93.0
12.5      ,205.0
14.1      ,315.0
15.7      ,425.0
17.5      ,540.0
19.0      ,650.0
20.8      ,760.0
22.8      ,870.0
** Unit: mJ/(tonne.C)
*SPECIFIC HEAT
410000000.,20.0
427000000.,93.0
456000000.,205.0
481000000.,315.0
511000000.,425.0
536000000.,540.0
565000000.,650.0
590000000.,760.0
620000000.,870.0
** Unit: tonne/mm^3
*DENSITY
8.4400E-09,0.0
**HM_UNSUPPORTED_MATERIAL
*LATENT HEAT, SMOOTH
 272E9, 1290., 1350., 18.
**HM_UNSUPPORTED_CARDS_MIDDLE
*ELEMENT PROGRESSIVE ACTIVATION, NAME="LDED.Printing", ELSET=PartToFabricate
*TABLE COLLECTION, NAME="ABQ_AM.MaterialDeposition"
*PARAMETER TABLE, TYPE= "ABQ_AM_MaterialDeposition"
 "LDED.PrintHeadDepositionTrajectory","Bead"
*PARAMETER TABLE,  TYPE= "ABQ_AM_MaterialDeposition_Bead"
 "Z", <beadHeight>, <beadWidth>, 0.,"Below"
*PARAMETER TABLE,  TYPE= "ABQ_AM_MaterialDeposition_Advanced"
 "Full",0.0,0.0,0.01,,,
*TABLE COLLECTION, NAME="ABQ_AM.EnergyInput"
*PARAMETER TABLE,  TYPE="ABQ_AM_MovingHeatSource"
 "LDED.LaserPath","Goldak"
*PARAMETER TABLE,  TYPE="ABQ_AM_MovingHeatSource_Advanced"
 "True","False","Relative",0.0,0.0,-1.0, 1.0
*PARAMETER TABLE,  TYPE="ABQ_AM_MovingHeatSource_Goldak"
 10, 10, 10,
 <GoldakParamA>, <GoldakParamB>, <GoldakParamCF>, <GoldakParamCR>,
 <GoldakParamFF>, <GoldakParamFR>,
 1.25
*PROPERTY TABLE, TYPE="ABQ_AM_AbsorptionCoeff"
 0.4
*Event Series, Name="LDED.PrintHeadDepositionTrajectory",
               Type="ABQ_AM_MaterialDeposition",
               Time=Total, input=./es_thinwall_dwell0.inp
*Event Series, Name="LDED.LaserPath",
               Type="ABQ_AM_PowerMagnitude",
               Time=Total, input=./es_thinwall_dwell0.inp
**HMNAME PROPERTY          4 Physical_Constant_4
*PHYSICAL CONSTANTS,ABSOLUTE ZERO = -273.15,STEFAN BOLTZMANN = 5.67e-11
**HWNAME LOADCOL          1 HM_IC_Load_Cols_1
**HWCOLOR LOADCOL          1    11
*INITIAL CONDITIONS, TYPE = TEMPERATURE
All,26.
**HMNAME LOADSTEP          1 Printing
*STEP, INC =        80000, NAME = Printing, EXTRAPOLATION = NO, UNSYMM=YES
*HEAT TRANSFER
0.5       ,1794.24   ,5.0000E-11,0.5
**HM_UNSUPPORTED_STEP_CARD
*ACTIVATE ELEMENTS,ACTIVATION="LDED.Printing"
 "ABQ_AM.MaterialDeposition"
*OUTPUT, FIELD, FREQUENCY = 1
*NODE OUTPUT
  NT
*OUTPUT, HISTORY, FREQUENCY = 1
*NODE OUTPUT, NSET = NOutputTC1
  NT
*OUTPUT, HISTORY, FREQUENCY = 1
*NODE OUTPUT, NSET = NOutputTC2
  NT
*OUTPUT, HISTORY, FREQUENCY = 1
*NODE OUTPUT, NSET = NOutputTC3
  NT
*END STEP
**HMNAME LOADSTEP          2 Cooling
*STEP, INC =        80000, NAME = Cooling, EXTRAPOLATION = NO, UNSYMM=YES
*HEAT TRANSFER
10.0      ,500.0     ,1.0000E-09,10.0
*OUTPUT, FIELD, FREQUENCY = 1
*NODE OUTPUT
  NT
*OUTPUT, HISTORY, FREQUENCY = 1
*NODE OUTPUT, NSET = NOutputTC1
 NT
*OUTPUT, HISTORY, FREQUENCY = 1
*NODE OUTPUT, NSET = NOutputTC2
 NT
*OUTPUT, HISTORY, FREQUENCY = 1
*NODE OUTPUT, NSET = NOutputTC3
 NT
*END STEP
**HMNAME LOADSTEP          3 MoreCooling
*STEP, INC =        80000, NAME = MoreCooling, EXTRAPOLATION = NO, UNSYMM=YES
*HEAT TRANSFER
100.0     ,10000.0   ,1.0000E-08,100.0
*OUTPUT, FIELD, FREQUENCY = 1
*NODE OUTPUT
 NT
*OUTPUT, HISTORY, FREQUENCY = 1
*NODE OUTPUT, NSET = NOutputTC1
 NT
*OUTPUT, HISTORY, FREQUENCY = 1
*NODE OUTPUT, NSET = NOutputTC2
 NT
*OUTPUT, HISTORY, FREQUENCY = 1
*NODE OUTPUT, NSET = NOutputTC3
 NT
*END STEP
*****
**<?xml version="1.0" encoding="utf-8"?>
**<Altair_XML_Export>
**    <UDM xmlns:SOAP-ENV="http://schemas.xmlsoap.org/soap/envelope/" xmlns:SOAP-ENC="http://schemas.xmlsoap.org/soap/encoding/" xmlns:xsi="http://www.w3.org/2001/XMLSchema-instance" xmlns:xsd="http://www.w3.org/2001/XMLSchema" xmlns:udmcfg="http://schemas.altair.com/AltairUDMRuntimeConfig" xmlns:udmxml="http://schemas.altair.com/AltairUDM" 
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**        <udmxml:EntityCollection xsi:type="udmxml:EntityCollectionCType">
**            <udmxml:Entity xsi:type="udmxml:AssemblyDMCType" displayName="HW_Assembly" contentDefinitionType="UDMAssemblyDM" id="d636ab3d52defe45b33a4f0d351778e7:0">
**                <udmxml:Children>
**                    <udmxml:Child xsi:type="udmxml:ChildCType" refId="a4eb3bb888ca0847a502fc8b16f0f7a0:0" timestamp="1750451645038839" childFlags="0" groupName="boas" contentDefinitionType="UDMBOA"/>
**                </udmxml:Children>
**            </udmxml:Entity>
**            <udmxml:Entity xsi:type="udmxml:BOACType" displayName="hm1" contentDefinitionType="UDMBOA" id="a4eb3bb888ca0847a502fc8b16f0f7a0:0">
**                <udmxml:Children>
**                    <udmxml:Child xsi:type="udmxml:ChildCType" refId="4e2e0a437c713747883b0bd2264bba7a:0" timestamp="1750451645044175" childFlags="0" groupName="parts" contentDefinitionType="UDMPartProtoOcc">
**                        <AdditionalIdList xsi:type="udmxml:AdditionalIdCType" xmlns="http://schemas.altair.com/AltairUDM" keyValue="Model" keyName="displayname" contentDefinitionType="UDMPartProtoOcc"/>
**                    </udmxml:Child>
**                </udmxml:Children>
**            </udmxml:Entity>
**            <udmxml:Entity xsi:type="udmxml:PartCType" displayName="Substrate.p" contentDefinitionType="UDMPartProto" id="6fa5a20f912a104db10e6a7e742230b4:0">
**                <udmxml:Attributes>
**                    <udmxml:Attribute xsi:type="udmxml:AttributeCType" valueutf8="-" type="string" name="studyrevision" displayName="STUDY_REVISION">-</udmxml:Attribute>
**                    <udmxml:Attribute xsi:type="udmxml:AttributeCType" valueutf8="Substrate" type="string" name="HW_UID">Substrate</udmxml:Attribute>
**                    <udmxml:Attribute xsi:type="udmxml:AttributeCType" valueutf8="-" type="string" name="PLMXML_PRODUCTREVISION_REVISION">-</udmxml:Attribute>
**                </udmxml:Attributes>
**            </udmxml:Entity>
**            <udmxml:Entity xsi:type="udmxml:PartCType" displayName="am_lded_thinwall_inconel625_dwell0_ht.inp.p" contentDefinitionType="UDMPartProto" id="4de010c026537b49ac6fb892d9e09449:0">
**                <udmxml:Attributes>
**                    <udmxml:Attribute xsi:type="udmxml:AttributeCType" valueutf8="-" type="string" name="studyrevision" displayName="STUDY_REVISION">-</udmxml:Attribute>
**                    <udmxml:Attribute xsi:type="udmxml:AttributeCType" valueutf8="am_lded_thinwall_inconel625_dwell0_ht.inp" type="string" name="HW_UID">am_lded_thinwall_inconel625_dwell0_ht.inp</udmxml:Attribute>
**                    <udmxml:Attribute xsi:type="udmxml:AttributeCType" valueutf8="-" type="string" name="PLMXML_PRODUCTREVISION_REVISION">-</udmxml:Attribute>
**                </udmxml:Attributes>
**                <udmxml:Children>
**                    <udmxml:Child xsi:type="udmxml:ChildCType" refId="189447d581bea74cbb55dcf75935818b:0" timestamp="1750451645727924" childFlags="0" groupName="partprotoinst" contentDefinitionType="UDMPartProtoInst"/>
**                    <udmxml:Child xsi:type="udmxml:ChildCType" refId="c925f20627017442b04b5cf0db1b6c4c:0" timestamp="1750451645732989" childFlags="0" groupName="partprotoinst" contentDefinitionType="UDMPartProtoInst"/>
**                    <udmxml:Child xsi:type="udmxml:ChildCType" refId="5bbf7fc9c4d8564bb119d47d66f80773:0" timestamp="1750451645739003" childFlags="0" groupName="partprotoinst" contentDefinitionType="UDMPartProtoInst"/>
**                </udmxml:Children>
**            </udmxml:Entity>
**            <udmxml:Entity xsi:type="udmxml:PartCType" displayName="Module Model.p" contentDefinitionType="UDMPartProto" id="bc9fe9a0b1cf3741abfe9ca088c284a8:0">
**                <udmxml:Children>
**                    <udmxml:Child xsi:type="udmxml:ChildCType" refId="df7a35b5c68cf840a5a63428777bb427:0" timestamp="1750451645725920" childFlags="0" groupName="partprotoinst" contentDefinitionType="UDMPartProtoInst"/>
**                </udmxml:Children>
**            </udmxml:Entity>
**            <udmxml:Entity xsi:type="udmxml:PartCType" displayName="Substrate" contentDefinitionType="UDMPartProtoInst" id="c925f20627017442b04b5cf0db1b6c4c:0">
**                <udmxml:Attributes>
**                    <udmxml:Attribute xsi:type="udmxml:AttributeCType" valueutf8="1 0 0 0 0 1 0 0 0 0 1 0 0 0 0 1" type="string" name="trfmtx" displayName="Transformation matrix">1 0 0 0 0 1 0 0 0 0 1 0 0 0 0 1</udmxml:Attribute>
**                    <udmxml:Attribute xsi:type="udmxml:AttributeCType" valueutf8="true" type="boolean" name="trfmtxisrel" displayName="Is matrix relative?">true</udmxml:Attribute>
**                </udmxml:Attributes>
**                <udmxml:Children>
**                    <udmxml:Child xsi:type="udmxml:ChildCType" refId="6fa5a20f912a104db10e6a7e742230b4:0" timestamp="1750451645732989" childFlags="0" groupName="partprotos" contentDefinitionType="UDMPartProto"/>
**                </udmxml:Children>
**                <TransformationMatrix xsi:type="udmxml:TransformationMatrixCType" xmlns="http://schemas.altair.com/AltairUDM" transformationMatrixIsRelative="true" transformationMatrix="1 0 0 0 0 1 0 0 0 0 1 0 0 0 0 1"/>
**            </udmxml:Entity>
**            <udmxml:Entity xsi:type="udmxml:PartCType" displayName="am_lded_thinwall_inconel625_dwell0_ht.inp" contentDefinitionType="UDMPartProtoInst" id="df7a35b5c68cf840a5a63428777bb427:0">
**                <udmxml:Attributes>
**                    <udmxml:Attribute xsi:type="udmxml:AttributeCType" valueutf8="1 0 0 0 0 1 0 0 0 0 1 0 0 0 0 1" type="string" name="trfmtx" displayName="Transformation matrix">1 0 0 0 0 1 0 0 0 0 1 0 0 0 0 1</udmxml:Attribute>
**                    <udmxml:Attribute xsi:type="udmxml:AttributeCType" valueutf8="true" type="boolean" name="trfmtxisrel" displayName="Is matrix relative?">true</udmxml:Attribute>
**                </udmxml:Attributes>
**                <udmxml:Children>
**                    <udmxml:Child xsi:type="udmxml:ChildCType" refId="4de010c026537b49ac6fb892d9e09449:0" timestamp="1750451645725920" childFlags="0" groupName="partprotos" contentDefinitionType="UDMPartProto"/>
**                </udmxml:Children>
**                <TransformationMatrix xsi:type="udmxml:TransformationMatrixCType" xmlns="http://schemas.altair.com/AltairUDM" transformationMatrixIsRelative="true" transformationMatrix="1 0 0 0 0 1 0 0 0 0 1 0 0 0 0 1"/>
**            </udmxml:Entity>
**            <udmxml:Entity xsi:type="udmxml:PartCType" protoInstanceRefId="c925f20627017442b04b5cf0db1b6c4c:0" prototypeRefId="6fa5a20f912a104db10e6a7e742230b4:0" displayName="Substrate" contentDefinitionType="UDMPartProtoOcc" id="7cb914e76a94f74db2b7105d03b260bc:0">
**                <udmxml:Attributes>
**                    <udmxml:Attribute xsi:type="udmxml:AttributeCType" valueutf8="6fa5a20f912a104db10e6a7e742230b4" type="string" name="protoref" displayName="Prototype reference">6fa5a20f912a104db10e6a7e742230b4</udmxml:Attribute>
**                    <udmxml:Attribute xsi:type="udmxml:AttributeCType" valueutf8="c925f20627017442b04b5cf0db1b6c4c" type="string" name="protoinstanceref" displayName="Prototype Instance reference">c925f20627017442b04b5cf0db1b6c4c</udmxml:Attribute>
**                    <udmxml:Attribute xsi:type="udmxml:AttributeCType" valueutf8="Components(2)" type="string" name="EntitySelectionExp">Components(2)</udmxml:Attribute>
**                    <udmxml:Attribute xsi:type="udmxml:AttributeCType" valueutf8="2" type="string" name="SelectionExp">2</udmxml:Attribute>
**                    <udmxml:Attribute xsi:type="udmxml:AttributeCType" valueutf8="11" type="string" name="UdmxmlString_HmOccurrenceColor">11</udmxml:Attribute>
**                    <udmxml:Attribute xsi:type="udmxml:AttributeCType" valueutf8="8" type="string" name="UdmxmlString_HmOccurrenceId">8</udmxml:Attribute>
**                    <udmxml:Attribute xsi:type="udmxml:AttributeCType" valueutf8="9757073" type="string" name="UdmxmlString_HmOccurrenceTrueColor">9757073</udmxml:Attribute>
**                </udmxml:Attributes>
**            </udmxml:Entity>
**            <udmxml:Entity xsi:type="udmxml:PartCType" protoInstanceRefId="df7a35b5c68cf840a5a63428777bb427:0" prototypeRefId="4de010c026537b49ac6fb892d9e09449:0" displayName="am_lded_thinwall_inconel625_dwell0_ht.inp" contentDefinitionType="UDMPartProtoOcc" id="7a01e525e4f34343bf7d3a08f54fa3cf:0">
**                <udmxml:Attributes>
**                    <udmxml:Attribute xsi:type="udmxml:AttributeCType" valueutf8="4de010c026537b49ac6fb892d9e09449" type="string" name="protoref" displayName="Prototype reference">4de010c026537b49ac6fb892d9e09449</udmxml:Attribute>
**                    <udmxml:Attribute xsi:type="udmxml:AttributeCType" valueutf8="df7a35b5c68cf840a5a63428777bb427" type="string" name="protoinstanceref" displayName="Prototype Instance reference">df7a35b5c68cf840a5a63428777bb427</udmxml:Attribute>
**                    <udmxml:Attribute xsi:type="udmxml:AttributeCType" valueutf8="59" type="string" name="UdmxmlString_HmOccurrenceColor">59</udmxml:Attribute>
**                    <udmxml:Attribute xsi:type="udmxml:AttributeCType" valueutf8="4" type="string" name="UdmxmlString_HmOccurrenceId">4</udmxml:Attribute>
**                    <udmxml:Attribute xsi:type="udmxml:AttributeCType" valueutf8="7389155" type="string" name="UdmxmlString_HmOccurrenceTrueColor">7389155</udmxml:Attribute>
**                </udmxml:Attributes>
**                <udmxml:Children>
**                    <udmxml:Child xsi:type="udmxml:ChildCType" refId="3a8521aa161f2b46b0dbf4124cb92faf:0" timestamp="1750451645727924" childFlags="0" groupName="partprotooccs" contentDefinitionType="UDMPartProtoOcc">
**                        <AdditionalIdList xsi:type="udmxml:AdditionalIdCType" xmlns="http://schemas.altair.com/AltairUDM" keyValue="PartToFabricate" keyName="displayname" contentDefinitionType="UDMPartProtoOcc"/>
**                    </udmxml:Child>
**                    <udmxml:Child xsi:type="udmxml:ChildCType" refId="7cb914e76a94f74db2b7105d03b260bc:0" timestamp="1750451645732989" childFlags="0" groupName="partprotooccs" contentDefinitionType="UDMPartProtoOcc">
**                        <AdditionalIdList xsi:type="udmxml:AdditionalIdCType" xmlns="http://schemas.altair.com/AltairUDM" keyValue="Substrate" keyName="displayname" contentDefinitionType="UDMPartProtoOcc"/>
**                    </udmxml:Child>
**                    <udmxml:Child xsi:type="udmxml:ChildCType" refId="74cfe67efb656249b449a0e35ffb2df8:0" timestamp="1750451645739003" childFlags="0" groupName="partprotooccs" contentDefinitionType="UDMPartProtoOcc">
**                        <AdditionalIdList xsi:type="udmxml:AdditionalIdCType" xmlns="http://schemas.altair.com/AltairUDM" keyValue="Clamp" keyName="displayname" contentDefinitionType="UDMPartProtoOcc"/>
**                    </udmxml:Child>
**                </udmxml:Children>
**            </udmxml:Entity>
**            <udmxml:Entity xsi:type="udmxml:PartCType" prototypeRefId="bc9fe9a0b1cf3741abfe9ca088c284a8:0" displayName="Model" contentDefinitionType="UDMPartProtoOcc" id="4e2e0a437c713747883b0bd2264bba7a:0">
**                <udmxml:Attributes>
**                    <udmxml:Attribute xsi:type="udmxml:AttributeCType" valueutf8="bc9fe9a0b1cf3741abfe9ca088c284a8" type="string" name="protoref" displayName="Prototype reference">bc9fe9a0b1cf3741abfe9ca088c284a8</udmxml:Attribute>
**                    <udmxml:Attribute xsi:type="udmxml:AttributeCType" valueutf8="43" type="string" name="UdmxmlString_HmOccurrenceColor">43</udmxml:Attribute>
**                    <udmxml:Attribute xsi:type="udmxml:AttributeCType" valueutf8="2" type="string" name="UdmxmlString_HmOccurrenceId">2</udmxml:Attribute>
**                    <udmxml:Attribute xsi:type="udmxml:AttributeCType" valueutf8="9869273" type="string" name="UdmxmlString_HmOccurrenceTrueColor">9869273</udmxml:Attribute>
**                    <udmxml:Attribute xsi:type="udmxml:AttributeCType" valueutf8="true" type="boolean" name="pseudo root">true</udmxml:Attribute>
**                </udmxml:Attributes>
**                <udmxml:Children>
**                    <udmxml:Child xsi:type="udmxml:ChildCType" refId="7a01e525e4f34343bf7d3a08f54fa3cf:0" timestamp="1750451645725920" childFlags="0" groupName="partprotooccs" contentDefinitionType="UDMPartProtoOcc">
**                        <AdditionalIdList xsi:type="udmxml:AdditionalIdCType" xmlns="http://schemas.altair.com/AltairUDM" keyValue="am_lded_thinwall_inconel625_dwell0_ht.inp" keyName="displayname" contentDefinitionType="UDMPartProtoOcc"/>
**                    </udmxml:Child>
**                </udmxml:Children>
**            </udmxml:Entity>
**        </udmxml:EntityCollection>
**        <udmxml:RelationCollection xsi:type="udmxml:RelationCollectionCType"/>
**        <udmxml:RootEntities xsi:type="udmxml:RootEntityCollectionCType">
**            <udmxml:ItemId>d636ab3d52defe45b33a4f0d351778e7:0</udmxml:ItemId>
**        </udmxml:RootEntities>
**    </UDM>
**</Altair_XML_Export>
