*Heading
*Node, nset=nall
*Include, input="nodesAM.inp"
*Element, type=DC3D8, elset=eall
*Include, input="elemsAM.inp"
**
**----------------------------------------------------------------------------------------------
**
*PHYSICAL CONSTANTS, ABSOLUTE ZERO=0., STEFAN BOLTZMANN=5.670373e-11
*MATERIAL, NAME=mat
*CONDUCTIVITY, TYPE=ISO
 5.70496e-3
*SPECIFIC HEAT
 543917000.
*DENSITY
 4.43e-09
**----------------------------------------------------------------------------------------------
**
*Include, input="ABQ_am_special_purpose_types.inp"
**
*EVENT SERIES,  NAME="straightPath", TIME = STEP, TYPE="ABQ_AM_MaterialDeposition_VariableHeightWidth"
**
**    Time          X          Y          Z     On/Off    Bead Height  Bead Width
**
         0,         0,         0,         0,     6.e3,      3.,          2.
    0.5000,         0,         0,    0.5000,     6.e3,      3.,          2.
    1.0000,         0,         0,    1.0000,     6.e3,      3.,          2.
    1.5000,         0,         0,    1.5000,     6.e3,      3.,          2.
    2.0000,         0,         0,    2.0000,     4.e3,      2.,          2.
    2.5000,         0,         0,    2.5000,     4.e3,      2.,          2.
    3.0000,         0,         0,    3.0000,     4.e3,      2.,          2.
    3.5000,         0,         0,    3.5000,     4.e3,      2.,          2.
    4.0000,         0,         0,    4.0000,     6.e3,      3.,          2.
    4.5000,         0,         0,    4.5000,     6.e3,      3.,          2.
    5.0000,         0,         0,    5.0000,     6.e3,      3.,          2.
    5.5000,         0,         0,    5.5000,     6.e3,      3.,          2.
    6.0000,         0,         0,    6.0000,     4.e3,      2.,          2.
    6.5000,         0,         0,    6.5000,     4.e3,      2.,          2.
    7.0000,         0,         0,    7.0000,     4.e3,      2.,          2.
    7.5000,         0,         0,    7.5000,     4.e3,      2.,          2.
    8.0000,         0,         0,    8.0000,     6.e3,      3.,          2.
    8.5000,         0,         0,    8.5000,     6.e3,      3.,          2.
    9.0000,         0,         0,    9.0000,     6.e3,      3.,          2.
    9.5000,         0,         0,    9.5000,     1.e3,      1.,          1.
   10.0000,         0,         0,   10.0000,     1.e3,      1.,          1.
   10.5000,         0,         0,   10.5000,     1.e3,      1.,          1.
   11.0000,         0,         0,   11.0000,     1.e3,      1.,          1.
**
*TABLE COLLECTION, NAME="ABQ_AM_straightPath"
*PARAMETER TABLE,  TYPE="ABQ_AM_MovingHeatSource"
 "straightPath",
 "Uniform",
*PARAMETER TABLE,  TYPE="ABQ_AM_MovingHeatSource_Uniform"
  12,
  12,
  12,
  0.,
  0.,
  0.,
  1,
  3,
  5,
*PARAMETER TABLE,  TYPE="ABQ_AM_MovingHeatSource_Advanced"
  "False",
  "False",
  "Relative",
  1.,
  0.,
  0.,
  1.,
*PARAMETER TABLE,  TYPE="ABQ_AM_MovingHeatSource_VariableBeadSize"
  2
  3
*PROPERTY TABLE,  TYPE="ABQ_AM_AbsorptionCoeff", DEPENDENCIES=0
  0.45
*SOLID SECTION, MATERIAL=mat, ELSET=eall
  1.
*INITIAL CONDITIONS, TYPE=TEMPERATURE, section specification=uniform
 ,300.
** ------------------------------------
*STEP, NAME="Transient Heat Transfer Step1", AMPLITUDE=STEP, EXTRAPOLATION=NO, INC=10000, UNSYMM=YES
*HEAT TRANSFER, DELTMX=5000., MXDEM=0.1
 0.5, 11., 1e-05, 0.5
*DFLUX, OP=NEW
 eall, MBFNU, 1000., "ABQ_AM_straightPath"
** Output request Output2
*OUTPUT, FIELD, FREQUENCY=1
*NODE OUTPUT
 NT
*OUTPUT,HISTORY, FREQ=0
*END STEP
